# Модель проницаемостей из "Подземной гидромеханики"
Swoc := 0.2
Sorw := 0.15
α1 := 3.5
α2 := 2.8
βrw := 2.4
Sgc := 0.1
Slc := 0.2
α3 := 3.5
α4 := 3.5
βrg := 3
# Зависимости в двухфазном случае для различных систем
# Модифицированная первая модель Стоуна
krw(Sw) :=
    0 if 0 ≤ Sw ≤ Swoc
    ((Sw - Swoc)/(1 - Swoc))^α1 if Swoc < Sw ≤ 1
Sogcr := Slc
Sowcr := Sorw
Som := min(Sowcr, Sogcr)
So(Sw, Sg) := 1 - Sw - Sg
SSo(Sw, Sg) :=
    (So(Sw, Sg) - Som)/(1 - Swoc - Som) if So(Sw, Sg) > Som
    0 if So(Sw, Sg) ≤ Som
krow(Sw) :=
    ((1 - Sw - Sorw)/(1 - Sorw))^α2 if 0 ≤ Sw ≤ (1 - Sorw)
    0 if (1 - Sorw) < Sw ≤ 1
krg(Sg) :=
    0 if 0 ≤ Sg ≤ Sgc
    ((Sg - Sgc)/(1 - Sgc))^α3*(1 + βrg*(1 - Sg)) if Sgc < Sg ≤ 1
SSw(Sw) :=
    (Sw - Swoc)/(1 - Swoc - Som) if Sw > Swoc
    0 if Sw ≤ Swoc
SSg(Sg) := Sg/(1 - Swoc - Som)
krog(Sg) :=
    ((1 - Slc - Sg)/(1 - Slc))^α4 if 0 ≤ Sg ≤ (1 - Slc)
    0 if (1 - Slc) < Sg ≤ 1
Fw(Sw) := krow(Sw)/krow(Swoc)*(1 - SSw(Sw))
Fg(Sg) := krog(Sg)/krow(Swoc)*(1 - SSg(Sg))
# Простейшая формула для нефти в трехфазном случае
kros(Sw, Sg) := krow(Swoc)*SSo(Sw, Sg)*Fw(Sw)*Fg(Sg)
kro(Sw, Sg) := krow(Sw)*krog(Sg)
# Лин. комбинация для нефти из ECLIPSE
kroe(Sw, Sg) := (Sg*krog(Sg) + (Sw - Swoc)*krow(Sw))/(Sg + Sw - Swoc)
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